# Case 3
# Efter analyse i opg 1 ved vi følgende:
f_hyl := 785 Hz
fs := 48000 Hz
ω == 2*π*(f_hyl/fs)
# Vi ved, da vi gerne vil lave et notch filter, at nulpunktet ved den frekvens/vinkelfrekvens vi gerne vil fjerne/dæmpe skal have længden 1 og polen skal ligge relativt tæt på, så vi ikke dæmper de nærliggende frekvenser for meget.
# Komplekse tal for nulpunkt:
Z_n == e^(1j*ω)
conj(Z_n) == e^(-1j*ω)
# Komplekse tal for pol:
Z_p == r*e^(1j*ω)
conj(Z_p) == r*e^(-1j*ω)
# Overføringsfunktionen for 2. ordens notch filter ser således ud:
H(z) == (z - Z_n)*(z - conj(Z_n))/((z - Z_p)*(z - conj(Z_p))) == (z - e^(1j*ω))*(z - e^(-1j*ω))/((z - r*e^(1j*ω))*(z - r*e^(-1j*ω)))
# Ganger ind i parentes og sætter uden for parentes -->
(z^2 - z*(e^(1j*ω) + e^(-1j*ω)) + 1)/(z^2 - r*z*(e^(1j*ω) + e^(-1j*ω)) + r^2)  # vi ved at: e^(1j*ω) == cos(ω) + 1j*sin(ω) og får derfor -->
(z^2 - z*2*cos(ω) + 1)/(z^2 - r*z*2*cos(ω) + r^2)  # ganger med z^-2/z^-2-->
(1 - 2*cos(ω)*z^-1 + z^-2)/(1 - 2*r*cos(ω)*z^-1 + r^2*z^-2)
# Vi har hermed:
H(z) == Y(z)/X(z) == (1 - 2*cos(ω)*z^-1 + z^-2)/(1 - 2*r*cos(ω)*z^-1 + r^2*z^-2)
# Vi kan også opstille vores overføringsfunktion på følgende måde:
H(z) == (z - Z_n)*(z - conj(Z_n))/((z - Z_p)*(z - conj(Z_p))) == (z - e^(1j*ω))*(z - e^(-1j*ω))/((z - r*e^(1j*ω))*(z - r*e^(-1j*ω))) == (b_0 + b_1*z^-1 + b_2*z^-2)/(a_0 + a_1*z^-1 + a_2*z^-2)
H(z) == (b_0 + b_1*z^-1 + b_2*z^-2)/(a_0 + a_1*z^-1 + a_2*z^-2)
# hvor
b_0 := 1
b_1 := -2*cos(ω)  # error: This variable is undefined. Check that the label is set correctly.
b_2 := 1
a_0 := 1
a_1 := -2*r*cos(ω)  # error: This variable is undefined. Check that the label is set correctly.
a_2 := r^2  # error: This variable is undefined. Check that the label is set correctly.
# For at finde differensligningen kan vi gøre følgende:
H(z) == Y(z)/X(z) == (1 - 2*cos(ω)*z^-1 + z^-2)/(1 - 2*r*cos(ω)*z^-1 + r^2*z^-2)  # -->
X(z) - 2*X(z)*cos(ω)*z^-1 + X(z)*z^-2 + 2*Y(z)*r*cos(ω)*z^-1 - Y(z)*r^2*z^-2 == (X(z) - 2*X(z)*cos(ω)*z^-1 + X(z)*z^-2)/(1 - 2*r*cos(ω)*z^-1 + r^2*z^-2)
Y(z) == (X(z) - 2*X(z)*cos(ω)*z^-1 + X(z)*z^-2)/(1 - 2*r*cos(ω)*z^-1 + r^2*z^-2)
(2*z*X(z)*cos(ω) - (z^2 + 1)*X(z))/(2*r*z*cos(ω) - (z^2 + r^2)) == (X(z) - 2*X(z)*cos(ω)*z^-1 + X(z)*z^-2)/(1 - 2*r*cos(ω)*z^-1 + r^2*z^-2) → 1
Y(z) - 2*Y(z)*r*cos(ω)*z^-1 + Y(z)*r^2*z^-2 == X(z) - 2*X(z)*cos(ω)*z^-1 + X(z)*z^-2
Y(z)/X(z) == (1 - 2*cos(ω)*z^-1 + z^-2)/(1 - 2*r*cos(ω)*z^-1 + r^2*z^-2) solve, Y(z) → (2*z*X(z)*cos(ω) - (z^2 + 1)*X(z))/(2*r*z*cos(ω) - (z^2 + r^2))
Y(z) == X(z) - 2*X(z)*cos(ω)*z^-1 + X(z)*z^-2 + 2*Y(z)*r*cos(ω)*z^-1 - Y(z)*r^2*z^-2
# Invers z-transformation:
y(n) == x(n) - 2*cos(ω)*x(n - 1) + x(n - 2) + 2*r*cos(ω)*y(n - 1) - r^2*y(n - 2)
r := 0.9
ω := 2*π*(f_hyl/fs)
(X(z) - 2*X(z)*cos(ω)*z^-1 + X(z)*z^-2)/(1 - 2*r*cos(ω)*z^-1 + r^2*z^-2)*(1 - 2*r*cos(ω)*z^-1 + r^2*z^-2) == X(z) - 2*X(z)*cos(ω)*z^-1 + X(z)*z^-2 → 1
y(n) := x(n) - 2*cos(ω)*x(n - 1) + x(n - 2) + 2*r*cos(ω)*y(n - 1) - r^2*y(n - 2) → 1.79050539474*y(n - 1.0) + (x(n) + (x(n - 2.0) - 1.98945043859*x(n - 1.0)) - 0.81*y(n - 2.0))
y(n) == 1.79050539474*y(n - 1.0) + (x(n) + (x(n - 2.0) - 1.98945043859*x(n - 1.0)) - 0.81*y(n - 2.0))
Y(z)*(1 - 2*r*cos(ω)*z^-1 + r^2*z^-2) == Y(z) - 2*Y(z)*r*cos(ω)*z^-1 + Y(z)*r^2*z^-2 → 1
Y(z) - 2*Y(z)*r*cos(ω)*z^-1 + Y(z)*r^2*z^-2 + 2*Y(z)*r*cos(ω)*z^-1 - Y(z)*r^2*z^-2 → Y(z)
X(z) - 2*X(z)*cos(ω)*z^-1 + X(z)*z^-2 + 2*Y(z)*r*cos(ω)*z^-1 - Y(z)*r^2*z^-2
X(z) - 2*X(z)*cos(ω)*z^-1 + X(z)*z^-2 + 2*Y(z)*r*cos(ω)*z^-1 - Y(z)*r^2*z^-2
