# Lysets hastighed:
c := 340*m/s
# Samplingfrekvens:
fs := 48000 Hz
T_s := 1/fs = 20.8333 μs  # <-- tidsforskel mellem hvert sample
Δd := c/(2*fs) = 3.54167 mm  # <-- meter per sample
# Afstand på 0,26m:
n_peak := 213
n_echo := 262
Δ_n := n_echo - n_peak = 49  # <-- Afstand mellem peaks i samples
Δ_n*T_s = 1.02083 ms  # <-- Tidsforskydning
d := Δ_n*Δd = 0.173542 m  # <-- Afstand mellem signal og ekko
100 - d/(0.26*m)*100 = 33.2532  # %  # <-- Afvigelse fra måling
# Afstand på 0,5m:
n_peak := 151
n_echo := 256
Δ_n := n_echo - n_peak = 105  # <-- Afstand mellem peaks i samples
Δ_n*T_s = 2.1875 ms  # <-- Tidsforskydning
d := Δ_n*Δd = 0.371875 m  # <-- Afstand mellem signal og ekko
100 - d/(0.5*m)*100 = 25.625  # %  # <-- Afvigelse fra måling
# Afstand på 1m:
n_peak := 182
n_echo := 425
Δ_n := n_echo - n_peak = 243  # <-- Afstand mellem peaks i samples
Δ_n*T_s = 5.0625 ms  # <-- Tidsforskydning
d := Δ_n*Δd = 0.860625 m  # <-- Afstand mellem signal og ekko
100 - d/(1*m)*100 = 13.9375  # %  # <-- Afvigelse fra måling
# Afstand på 2m:
n_peak := 147
n_echo := 655
Δ_n := n_echo - n_peak = 508  # <-- Afstand mellem peaks i samples
Δ_n*T_s = 10.5833 ms  # <-- Tidsforskydning
d := Δ_n*Δd = 1.79917 m  # <-- Afstand mellem signal og ekko
100 - d/(2*m)*100 = 10.0417  # %  # <-- Afvigelse fra måling
# Afstand på 3m:
n_peak := 209
n_echo := 986
Δ_n := n_echo - n_peak = 777  # <-- Afstand mellem peaks i samples
Δ_n*T_s = 16.1875 ms  # <-- Tidsforskydning
d := Δ_n*Δd = 2.75188 m  # <-- Afstand mellem signal og ekko
100 - d/(3*m)*100 = 8.27083  # %  # <-- Afvigelse fra måling
